*NODE
1, 0, 0, 0
2, 5, 0, 0
3, 10, 0, 0
4, 15, 0, 0
5, 20, 0, 0
6, 25, 0, 0
7, 30, 0, 0
8, 35, 0, 0
9, 40, 0, 0
10, 0, 5, 0
11, 10, 5, 0
12, 20, 5, 0
13, 30, 5, 0
14, 40, 5, 0
15, 0, 10, 0
16, 5, 10, 0
17, 10, 10, 0
18, 15, 10, 0
19, 20, 10, 0
20, 25, 10, 0
21, 30, 10, 0
22, 35, 10, 0
23, 40, 10, 0
24, 0, 15, 0
25, 10, 15, 0
26, 20, 15, 0
27, 30, 15, 0
28, 40, 15, 0
29, 0, 20, 0
30, 5, 20, 0
31, 10, 20, 0
32, 15, 20, 0
33, 20, 20, 0
34, 25, 20, 0
35, 30, 20, 0
36, 35, 20, 0
37, 40, 20, 0
38, 0, 0, 5
39, 10, 0, 5
40, 20, 0, 5
41, 30, 0, 5
42, 40, 0, 5
43, 0, 10, 5
44, 10, 10, 5
45, 20, 10, 5
46, 30, 10, 5
47, 40, 10, 5
48, 0, 20, 5
49, 10, 20, 5
50, 20, 20, 5
51, 30, 20, 5
52, 40, 20, 5
53, 0, 0, 10
54, 5, 0, 10
55, 10, 0, 10
56, 15, 0, 10
57, 20, 0, 10
58, 25, 0, 10
59, 30, 0, 10
60, 35, 0, 10
61, 40, 0, 10
62, 0, 5, 10
63, 10, 5, 10
64, 20, 5, 10
65, 30, 5, 10
66, 40, 5, 10
67, 0, 10, 10
68, 5, 10, 10
69, 10, 10, 10
70, 15, 10, 10
71, 20, 10, 10
72, 25, 10, 10
73, 30, 10, 10
74, 35, 10, 10
75, 40, 10, 10
76, 0, 15, 10
77, 10, 15, 10
78, 20, 15, 10
79, 30, 15, 10
80, 40, 15, 10
81, 0, 20, 10
82, 5, 20, 10
83, 10, 20, 10
84, 15, 20, 10
85, 20, 20, 10
86, 25, 20, 10
87, 30, 20, 10
88, 35, 20, 10
89, 40, 20, 10
90, 0, 0, 15
91, 10, 0, 15
92, 20, 0, 15
93, 30, 0, 15
94, 40, 0, 15
95, 0, 10, 15
96, 10, 10, 15
97, 20, 10, 15
98, 30, 10, 15
99, 40, 10, 15
100, 0, 20, 15
101, 10, 20, 15
102, 20, 20, 15
103, 30, 20, 15
104, 40, 20, 15
105, 0, 0, 20
106, 5, 0, 20
107, 10, 0, 20
108, 15, 0, 20
109, 20, 0, 20
110, 25, 0, 20
111, 30, 0, 20
112, 35, 0, 20
113, 40, 0, 20
114, 0, 5, 20
115, 10, 5, 20
116, 20, 5, 20
117, 30, 5, 20
118, 40, 5, 20
119, 0, 10, 20
120, 5, 10, 20
121, 10, 10, 20
122, 15, 10, 20
123, 20, 10, 20
124, 25, 10, 20
125, 30, 10, 20
126, 35, 10, 20
127, 40, 10, 20
128, 0, 15, 20
129, 10, 15, 20
130, 20, 15, 20
131, 30, 15, 20
132, 40, 15, 20
133, 0, 20, 20
134, 5, 20, 20
135, 10, 20, 20
136, 15, 20, 20
137, 20, 20, 20
138, 25, 20, 20
139, 30, 20, 20
140, 35, 20, 20
141, 40, 20, 20
*ELEMENT, TYPE=C3D20R, ELSET=EALL
1, 1, 3, 17, 15, 53, 55, 69, 67, 2, 11, 16, 10, 54, 63, 68,
62, 38, 39, 44, 43
2, 3, 5, 19, 17, 55, 57, 71, 69, 4, 12, 18, 11, 56, 64, 70,
63, 39, 40, 45, 44
3, 5, 7, 21, 19, 57, 59, 73, 71, 6, 13, 20, 12, 58, 65, 72,
64, 40, 41, 46, 45
4, 7, 9, 23, 21, 59, 61, 75, 73, 8, 14, 22, 13, 60, 66, 74,
65, 41, 42, 47, 46
5, 15, 17, 31, 29, 67, 69, 83, 81, 16, 25, 30, 24, 68, 77, 82,
76, 43, 44, 49, 48
6, 17, 19, 33, 31, 69, 71, 85, 83, 18, 26, 32, 25, 70, 78, 84,
77, 44, 45, 50, 49
7, 19, 21, 35, 33, 71, 73, 87, 85, 20, 27, 34, 26, 72, 79, 86,
78, 45, 46, 51, 50
8, 21, 23, 37, 35, 73, 75, 89, 87, 22, 28, 36, 27, 74, 80, 88,
79, 46, 47, 52, 51
9, 53, 55, 69, 67, 105, 107, 121, 119, 54, 63, 68, 62, 106, 115, 120,
114, 90, 91, 96, 95
10, 55, 57, 71, 69, 107, 109, 123, 121, 56, 64, 70, 63, 108, 116, 122,
115, 91, 92, 97, 96
11, 57, 59, 73, 71, 109, 111, 125, 123, 58, 65, 72, 64, 110, 117, 124,
116, 92, 93, 98, 97
12, 59, 61, 75, 73, 111, 113, 127, 125, 60, 66, 74, 65, 112, 118, 126,
117, 93, 94, 99, 98
13, 67, 69, 83, 81, 119, 121, 135, 133, 68, 77, 82, 76, 120, 129, 134,
128, 95, 96, 101, 100
14, 69, 71, 85, 83, 121, 123, 137, 135, 70, 78, 84, 77, 122, 130, 136,
129, 96, 97, 102, 101
15, 71, 73, 87, 85, 123, 125, 139, 137, 72, 79, 86, 78, 124, 131, 138,
130, 97, 98, 103, 102
16, 73, 75, 89, 87, 125, 127, 141, 139, 74, 80, 88, 79, 126, 132, 140,
131, 98, 99, 104, 103
*NSET, NSET=FIX
1, 10, 15, 24, 29, 38, 43, 48, 53, 62
67, 76, 81, 90, 95, 100, 105, 114, 119, 128
133
*MATERIAL, NAME=STEEL
*ELASTIC
210000, 0.3
*SOLID SECTION, ELSET=EALL, MATERIAL=STEEL
*STEP
*STATIC
*BOUNDARY
FIX, 1, 3
*CLOAD
141, 2, -500.
*NODE FILE
U
*EL FILE
S
*END STEP
