*HEADING
Kragbalken aus C3D20R-Elementen
*NODE, NSET=NALL
1, 0, 0, 0
2, 2.5, 0, 0
3, 5, 0, 0
4, 7.5, 0, 0
5, 10, 0, 0
6, 12.5, 0, 0
7, 15, 0, 0
8, 17.5, 0, 0
9, 20, 0, 0
10, 22.5, 0, 0
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*ELEMENT, TYPE=C3D20R, ELSET=EALL
1, 1, 3, 65, 63, 229, 231, 293, 291, 2, 43, 64, 42, 230, 271, 292,
270, 166, 167, 188, 187
2, 3, 5, 67, 65, 231, 233, 295, 293, 4, 44, 66, 43, 232, 272, 294,
271, 167, 168, 189, 188
3, 5, 7, 69, 67, 233, 235, 297, 295, 6, 45, 68, 44, 234, 273, 296,
272, 168, 169, 190, 189
4, 7, 9, 71, 69, 235, 237, 299, 297, 8, 46, 70, 45, 236, 274, 298,
273, 169, 170, 191, 190
5, 9, 11, 73, 71, 237, 239, 301, 299, 10, 47, 72, 46, 238, 275, 300,
274, 170, 171, 192, 191
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*NSET, NSET=FIX
1, 42, 63, 104, 125, 166, 187, 208, 229, 270
291, 332, 353, 394, 415, 436, 457, 498, 519, 560
581
*NSET, NSET=TIP
41, 62, 103, 124, 165, 186, 207, 228, 269, 290
331, 352, 393, 414, 435, 456, 497, 518, 559, 580
621
*MATERIAL, NAME=STEEL
*ELASTIC
210000, 0.3
*SOLID SECTION, ELSET=EALL, MATERIAL=STEEL
*STEP
*STATIC
*BOUNDARY
FIX, 1, 3
*CLOAD
TIP, 3, -4.761904762
*NODE FILE
U
*EL FILE
S
*END STEP
