*NODE
1, 0, 0, 0
2, 10, 0, 0
3, 10, 10, 0
4, 10, 10, 10
5, 5, 0, 0
6, 10, 5, 0
7, 5, 5, 0
8, 5, 5, 5
9, 10, 5, 5
10, 10, 10, 5
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*ELEMENT, TYPE=C3D10, ELSET=EALL
1, 1, 2, 3, 4, 5, 6, 7, 8, 9, 10
2, 1, 11, 2, 4, 12, 13, 5, 8, 14, 9
3, 1, 3, 15, 4, 7, 16, 17, 8, 10, 18
4, 1, 15, 19, 4, 17, 20, 21, 8, 18, 22
5, 1, 23, 11, 4, 24, 25, 12, 8, 26, 14
6, 1, 19, 23, 4, 21, 27, 24, 8, 22, 26
7, 23, 11, 4, 28, 25, 14, 26, 29, 30, 31
8, 23, 32, 11, 28, 33, 34, 25, 29, 35, 30
9, 23, 4, 19, 28, 26, 22, 27, 29, 31, 36
10, 23, 19, 37, 28, 27, 38, 39, 29, 36, 40
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*NSET, NSET=FIX
1, 2, 3, 5, 6, 7, 15, 16, 17, 64
66, 67, 72, 73, 74, 106, 108, 109, 114, 115
116, 148, 149, 151, 152, 153, 161, 190, 192, 193
198, 218, 220, 221, 226, 246, 247, 249, 250, 251
259, 288, 290, 291, 296, 316, 318, 319, 324
*MATERIAL, NAME=STEEL
*ELASTIC
210000, 0.3
*SOLID SECTION, ELSET=EALL, MATERIAL=STEEL
*STEP
*STATIC
*BOUNDARY
FIX, 1, 3
*CLOAD
336, 1, 200.
*NODE FILE
U
*EL FILE
S
*END STEP
